// COMSOL Multiphysics 6.3.0.290 model "skyrnion_Readcsv.mph"
// Outline of the model tree

Parameters
  currentiter = 0

Functions
  int1: Interpolation
    funcnametable = {{int1, 1}, {int2, 2}, {int3, 3}}
    source = file
    filename = D:\UCL_Bioelectronic_Undergrad\April_AI_Intern_2025\Comsol_Simulation\Skyrnion_Simulation_circular_disk\skyrnion_data_last_frame.csv
    scaledata = off
    defvars = on
    filecolumns = 5
    fileheaders = {X, Y, mX (1) @ t=2, mY (1) @ t=2, mZ (1) @ t=2}
    columnKeys = {col1, col2, col3, col4, col5}
    columnType = {col1, arg, col2, arg, col3, value, col4, value, col5, value}
    funcnames = {col1, int1, col2, int2, col3, int1, col4, int2, col5, int3}
    fununit = {1, 1, 1}
    argunit = {nm, nm}

Geometry
  geom1 "Geometry 1" (2D, length unit nm)
    c1: Circle | r = 40
    c2: Circle | r = 60
    c3: Circle | r = 100
    fin: Finalize "Form Union"

Physics
  mm: MicromagneticsTimeDomain on all domains
    dependent variable m = {mX, mY, mZ}
    LLG1: LandauLifshitzGilbertEquation (default) | alpha = 0.3; D = 1e-3; Dbtype = 1; Ditype = 0
    id1: ConservationOfUnitMoment (default)
    init1: init "Initial Values 1" (default) | m = {int1, int2, int3}
    init2: init "Initial Values 2" (disabled) on domains 1, 2 | m = {y/sqrt(x^2+y^2), -x/sqrt(x^2+y^2), 0}
    init3: init "Initial Values 3" (disabled) on domains 1 | m = {0, 0, -1}
    PBC1: PinningBoundaryCondition (disabled) on boundaries 1, 2, 7, 12 | m_0 = {0, 0, -1}

Mesh
  mesh1 "Mesh 1"
    size: MeshSizeDefault | hauto = 2
    ftri1: FreeTri "Free Triangular 1" on remaining entities

Studies
  std1 "Study 1"
    time: Transient "Time Dependent" | tunit = ns; tlist = range(0,0.020202020202,2)

Solver configurations
  sol1 "Solution 1" (study std1)
    v1: Variables "Dependent Variables 1"
    t1: Time "Time-Dependent Solver 1"
      fc1: FullyCoupled
      d1: Direct

Datasets
  dset1: Solution | solution = sol1

Plots
  pg1: PlotGroup2D "2D Plot Group 1" | data = dset1
    surf1: Surface | data = dset1; expr = mZ; unit = 1